// SBML level 3 version 1

model feedback()

  // Compartments:
  compartment default_compartment = 1;

  // Species:
  species GLCi in default_compartment = 0.2;
  species ATP in default_compartment = 3.2965;
  species G6P in default_compartment = 2.495;
  species ADP in default_compartment = 0.8925;
  species F6P in default_compartment = 0.66;
  species F16BP in default_compartment = 0.205;
  species AMP in default_compartment = 0.2585;
  species GLYCERAL3P in default_compartment = 0.01;
  species DHAP in default_compartment = 0.1815;
  species NAD in default_compartment = 1.5794;
  species PHOS in default_compartment = 10;
  species BPG in default_compartment = 0;
  species NADH in default_compartment = 0.0106;
  species P3G in default_compartment = 3.015;
  species P2G in default_compartment = 0.341;
  species PEP in default_compartment = 1.34;
  species PYR in default_compartment = 0.325;
  species ACE in default_compartment = 0.04;
  species ETOH in default_compartment = 10;
  species GLYC3P in default_compartment = 0.03;
  species GLYCEROL in default_compartment = 0.1;
  species G1P in default_compartment = 0.13;
  species T6P in default_compartment;
  species TRE in default_compartment = 56.1303;
  species IMP in default_compartment = 0.1;
  species INO in default_compartment = 0.1;
  species HYP in default_compartment = 1.5;

  // Parameters:
  p_GLT_KeqGLT = 1;
  p_GLT_KmGLTGLCo = 1.0078;
  p_GLT_KmGLTGLCi = 1.0078;
  p_HXK1_kcat = 6.2548;
  f_HXK1 = 1;
  f_HXK2 = 0;
  p_HXK1_Katp = 0.0931;
  p_HXK1_Kglc = 0.3483;
  p_HXK1_Keq = 3721.3;
  p_HXK1_Kadp = 0.3492;
  p_HXK1_Kg6p = 34.7029;
  p_HXK1_Kt6p = 0.0073;
  p_PGI1_kcat = 2.3215;
  f_PGI1 = 1;
  p_PGI1_Kg6p = 7.9987;
  p_PGI1_Keq = 0.9564;
  p_PGI1_Kf6p = 7.2433;
  p_PFK_kcat = 8.7826;
  f_PFK = 1;
  p_PFK_gR = 1.8127;
  p_PFK_Kf6p = 0.0589;
  p_PFK_Katp = 1.9971;
  p_PFK_L = 1.3886;
  p_PFK_Ciatp = 40.3824;
  p_PFK_Kiatp = 4.9332;
  p_PFK_Camp = 0.0287;
  p_PFK_Kamp = 0.01;
  p_PFK_Cf26bp = 0.0283;
  p_PFK_F26BP = 0.001;
  p_PFK_Kf26bp = 0.0012;
  p_PFK_Cf16bp = 2.3638;
  p_PFK_Kf16bp = 0.0437;
  p_PFK_Catp = 1.2822;
  p_FBA1_kcat = 4.4067;
  f_FBA1 = 1;
  p_FBA1_Kf16bp = 0.6872;
  p_FBA1_Keq = 0.1223;
  p_FBA1_Kglyceral3p = 3.5582;
  p_FBA1_Kdhap = 0.03;
  p_TPI1_kcat = 16.1694;
  f_TPI1 = 1;
  p_TPI1_Kdhap = 1.2887;
  p_TPI1_Keq = 0.0515;
  p_TPI1_Kglyceral3p = 8.8483;
  p_TDH1_kcat = 78.6422;
  f_TDH1 = 1;
  f_TDH2 = 0;
  f_TDH3 = 0;
  p_TDH1_Kglyceral3p = 0.5145;
  p_TDH1_Knad = 1.1775;
  p_TDH1_Kpi = 0.7731;
  p_TDH1_Keq = 0.0054;
  p_TDH1_Kglycerate13bp = 0.9076;
  p_TDH1_Knadh = 0.0419;
  p_PGK_VmPGK = 55.1626;
  p_PGK_KeqPGK = 3234.8;
  p_PGK_KmPGKATP = 0.2859;
  p_PGK_KmPGKP3G = 0.4759;
  p_PGK_KmPGKADP = 0.2064;
  p_PGK_KmPGKBPG = 0.0031;
  p_GPM1_kcat = 11.3652;
  f_GPM1 = 1;
  f_GPM2 = 0;
  f_GPM3 = 0;
  p_GPM1_K3pg = 1.4151;
  p_GPM1_Keq = 0.1193;
  p_GPM1_K2pg = 0.075;
  p_ENO1_kcat = 3.3018;
  f_ENO1 = 1;
  f_ENO2 = 0;
  p_ENO1_K2pg = 0.0567;
  p_ENO1_Keq = 4.3589;
  p_ENO1_Kpep = 0.4831;
  p_PYK1_kcat = 9.3167;
  f_PYK1 = 1;
  f_PYK2 = 0;
  p_PYK1_Kadp = 0.243;
  p_PYK1_Kpep = 0.281;
  p_PYK1_hill = 4;
  p_PYK1_L = 60000;
  p_PYK1_Katp = 9.3;
  p_PYK1_Kf16bp = 0.1732;
  p_PDC1_kcat = 8.3613;
  f_PDC1 = 0.529;
  p_PDC1_Kpyr = 12.968;
  p_PDC1_hill = 0.7242;
  p_PDC1_Kpi = 9.4294;
  p_ADH_VmADH = 13.2581;
  p_ADH_KiADHNAD = 0.9677;
  p_ADH_KmADHETOH = 4.897;
  p_ADH_KeqADH = 6.8487e-5;
  p_ADH_KmADHNAD = 0.1534;
  p_ADH_KmADHNADH = 0.1208;
  p_ADH_KiADHNADH = 0.0316;
  p_ADH_KmADHACE = 1.1322;
  p_ADH_KiADHACE = 0.6431;
  p_ADH_KiADHETOH = 59.6935;
  p_GPD1_kcat = 1.7064;
  f_GPD1 = 1;
  p_GPD1_Kdhap = 2.7041;
  p_GPD1_Knadh = 0.0322;
  p_GPD1_Keq = 10266;
  p_GPD1_Kf16bp = 12.7519;
  p_GPD1_Katp = 0.5573;
  p_GPD1_Kadp = 1.1069;
  p_GPD1_Kglyc3p = 3.2278;
  p_GPD1_Knad = 0.6902;
  p_HOR2_kcat = 1.2748;
  f_HOR2 = 1;
  p_HOR2_Kglyc3p = 2.5844;
  p_HOR2_Kpi = 2.5491;
  p_vacuolePi_k = 0.1699;
  p_vacuolePi_steadyStatePi = 10;
  p_ADK1_k = 77.3163;
  p_ADK1_Keq = 0.2676;
  p_mitoNADHKm = 0.001;
  p_kETOHtransport = 0.0328;
  f_ETOH_e = 0;
  p_GlycerolTransport = 0.1001;
  f_GLYCEROL_e = 0;
  km_sinkPYR = 0.001;
  km_sinkG6P = 0.01;
  km_sinkF6P = 0.0001;
  km_sinkGAP = 0.0005;
  km_sinkP3G = 0.001;
  km_sinkPEP = 0.001;
  km_sinkACE = 0.0001;
  ETOHec = 0;
  GLYCec = 0.09;
  p_PGM1_Keq = 21.3955;
  p_PGM1_Kg1p = 0.0653;
  p_PGM1_Kg6p = 0.0324;
  p_PGM1_kcat = 8.4574;
  p_TPS1_Kg6p = 4.5359;
  p_TPS1_Kudp_glc = 0.1268;
  p_TPS1_kcat = 9616.4;
  p_TPS1_Kpi = 0.789;
  p_TPS1_KmF6P = 1.5631;
  p_TPS2_Kt6p = 0.3686;
  p_TPS2_kcat = 28.4097;
  p_TPS2_Kpi = 0.7023;
  p_NTH1_Ktre = 2.1087;
  p_NTH1_kcat = 4.5132;
  p_mitoVmax = 1.6034;
  p_mitoADPKm = 0.3394;
  p_mitoPiKm = 0.4568;
  p_ATPaseK = 0.0346;
  p_Amd1_Vmax = 9.8464;
  p_Amd1_K50 = 10.9184;
  p_Amd1_Kpi = 1618.4;
  p_Ade13_Ade12_k = 0.6298;
  p_Isn1_k = 0.3654;
  p_Pnp1_k = 0.0149;
  p_Hpt1_k = 0.0112;
  p_Amd1_Katp = 5000;
  p_ATPase_Katp = 0;
  p_ATPase_ratio = 0.25;
  f_GLK1 = 0;
  f_GPD2 = 0;
  f_PGK1 = 0.132;
  f_PDC5 = 0.0059;
  f_PDC6 = 0.0034;
  f_ADH1 = 0.0933;
  f_ADH2 = 0;
  f_ADH3 = 0.0019;
  f_ADH4 = 0.0359;
  f_ADH5 = 0.0023;
  f_ADH6 = 0.0171;
  f_ADH7 = 0;
  f_RHR2 = 0;
  f_PGM1 = 1;
  f_PGM2 = 0;
  f_PGM3 = 0;
  f_UGP1 = 0.00031;
  f_TPS2 = 0.0013;
  f_NTH1 = 0.002;
  f_TPS1 = 0.0014;
  f_CO2 = 1;
  f_GLY = 0.15;
  f_Glyc = 0;
  f_SUCC = 0;
  f_Trh = 0;
  f_X = 0;
  f_TRE_e = 0;
  UDP_GLC = 0.07;

  // Assignment rules:
  p_GLT_VmGLT := piecewise(8.1327, time < 3000, 0.6542, time < 6000, 4.6312, time < 9000, 8.1327, time < 12000, 8.1327, time < 15000, 10.368, time < 18000, 23.2111, time < 21000, 13.3566, time < 24000, 11.6331);
  f_GLCo := piecewise(0.18, time < 3000, 0.13, time < 6000, 0.15, time < 9000, 0.18, time < 12000, 0.19, time < 15000, 0.45, time < 18000, 0.55, time < 21000, 1.44, time < 24000, 3.27);
  p_HXK_ExprsCor := piecewise(1, time < 3000, 1.3487, time < 6000, 1.2015, time < 9000, 1, time < 12000, 0.6553, time < 15000, 0.4138, time < 18000, 0.3693, time < 21000, 0.3639, time < 24000, 0.3768);
  p_T6P_ss := piecewise(0.1, time < 3000, 0.155, time < 6000, 0.185, time < 9000, 0.1, time < 12000, 0.055, time < 15000, 0.01, time < 18000, 0.01, time < 21000, 0.015, time < 24000, 0.015);
  p_PGI_ExprsCor := piecewise(1, time < 3000, 1.0019, time < 6000, 1.0012, time < 9000, 1, time < 12000, 0.9976, time < 15000, 0.9953, time < 18000, 0.9947, time < 21000, 0.994, time < 24000, 1.0061);
  p_PFK_ExprsCor := piecewise(1, time < 3000, 1.0032, time < 6000, 1.002, time < 9000, 1, time < 12000, 0.9805, time < 15000, 0.9748, time < 18000, 0.9956, time < 21000, 1.0686, time < 24000, 1.2072);
  p_FBA_ExprsCor := piecewise(1, time < 3000, 1.1341, time < 6000, 1.0715, time < 9000, 1, time < 12000, 0.8582, time < 15000, 0.8481, time < 18000, 1.0446, time < 21000, 1.2799, time < 24000, 1.5947);
  p_GAPDH_ExprsCor := piecewise(1, time < 3000, 1.5232, time < 6000, 1.3116, time < 9000, 1, time < 12000, 0.6622, time < 15000, 0.8659, time < 18000, 0.9867, time < 21000, 1.1195, time < 24000, 1.3605);
  p_PGK_ExprsCor := piecewise(1, time < 3000, 1.3247, time < 6000, 1.2053, time < 9000, 1, time < 12000, 0.6318, time < 15000, 0.4588, time < 18000, 0.4547, time < 21000, 0.487, time < 24000, 0.5581);
  p_PGM_ExprsCor := piecewise(1, time < 3000, 1.3484, time < 6000, 1.1996, time < 9000, 1, time < 12000, 0.7295, time < 15000, 0.8628, time < 18000, 1.1695, time < 21000, 1.5264, time < 24000, 1.9663);
  p_ENO_ExprsCor := piecewise(1, time < 3000, 1.6031, time < 6000, 1.3607, time < 9000, 1, time < 12000, 0.573, time < 15000, 0.8098, time < 18000, 1.1902, time < 21000, 1.6722, time < 24000, 2.1527);
  p_PYK_ExprsCor := piecewise(1, time < 3000, 1.1724, time < 6000, 1.1071, time < 9000, 1, time < 12000, 0.8751, time < 15000, 1.2257, time < 18000, 1.5879, time < 21000, 2.0238, time < 24000, 2.5581);
  p_PDC_ExprsCor := piecewise(1, time < 3000, 1.3175, time < 6000, 1.299, time < 9000, 1, time < 12000, 0.853, time < 15000, 1.2168, time < 18000, 1.7136, time < 21000, 2.2674, time < 24000, 2.6421);
  p_ADH_ExprsCor := piecewise(1, time < 3000, 1.3114, time < 6000, 1.1963, time < 9000, 1, time < 12000, 0.6308, time < 15000, 0.3534, time < 18000, 0.3211, time < 21000, 0.3737, time < 24000, 0.507);
  p_mitoNADHVmax := piecewise(0.2401, time < 3000, 0.1348, time < 6000, 0.1661, time < 9000, 0.2401, time < 12000, 0.5082, time < 15000, 1.0551, time < 18000, 0.9711, time < 21000, 0.7965, time < 24000, 0.6539);
  gam_ngam := piecewise(0.9306, time < 3000, 0.2639, time < 6000, 0.5139, time < 9000, 0.9306, time < 12000, 1.7639, time < 15000, 2.5972, time < 18000, 2.8056, time < 21000, 3.0139, time < 24000, 3.2222);
  adp_atp_ratio := piecewise(0.2707, time < 3000, 0.2746, time < 6000, 0.2692, time < 9000, 0.2707, time < 12000, 0.2726, time < 15000, 0.2407, time < 18000, 0.2388, time < 21000, 0.1592, time < 24000, 0.1652);
  poly_sinkPYR := piecewise(-0.1613283, time < 3000, -0.04045889, time < 6000, -0.08409861, time < 9000, -0.1613283, time < 12000, -0.3183152, time < 15000, -0.4712927, time < 18000, -0.4539148, time < 21000, -0.4124213, time < 24000, -0.3711034);
  RQ := piecewise(1.04, time < 3000, 1.05, time < 6000, 1.04, time < 9000, 1.04, time < 12000, 1.05, time < 15000, 1.48, time < 18000, 1.66, time < 21000, 2.8, time < 24000, 4.31);
  poly_sinkG6P := piecewise(-0.0778536, time < 3000, -0.0174592768, time < 6000, -0.038929075, time < 9000, -0.0778536, time < 12000, -0.1575328, time < 15000, -0.2212252, time < 18000, -0.2320591, time < 21000, -0.240166225, time < 24000, -0.2452012);
  poly_sinkF6P := piecewise(0.024574614, time < 3000, 0.003026524, time < 6000, 0.01395368, time < 9000, 0.024574614, time < 12000, 0.051417536, time < 15000, 0.080134506, time < 18000, 0.08140199, time < 21000, 0.08071701, time < 24000, 0.08085511);
  poly_sinkGAP := piecewise(0.0126269097, time < 3000, 0.004537961, time < 6000, 0.007904085, time < 9000, 0.0126269097, time < 12000, 0.0298387008, time < 15000, 0.0461597013, time < 18000, 0.04747219, time < 21000, 0.04831282, time < 24000, 0.05022758);
  poly_sinkP3G := piecewise(-0.007881, time < 3000, -0.00391524, time < 6000, -0.00504525, time < 9000, -0.007881, time < 12000, -0.017124, time < 15000, -0.031129, time < 18000, -0.0353743125, time < 21000, -0.03991725, time < 24000, -0.0447578125);
  poly_sinkPEP := piecewise(-0.007607, time < 3000, -0.00205948, time < 6000, -0.00404425, time < 9000, -0.007607, time < 12000, -0.015688, time < 15000, -0.025043, time < 18000, -0.0275808125, time < 21000, -0.03019825, time < 24000, -0.0328953125);
  poly_sinkACE := piecewise(-0.0348361668, time < 3000, -0.004975743, time < 6000, -0.02018683, time < 9000, -0.0348361668, time < 12000, -0.0652926592, time < 15000, -0.1112155, time < 18000, -0.1322402, time < 21000, -0.1629775, time < 24000, -0.2084777);
  p_TPI_ExprsCor := piecewise(1, time < 3000, 1.2507, time < 6000, 1.114, time < 9000, 1, time < 12000, 0.8783, time < 15000, 1.0878, time < 18000, 1.227, time < 21000, 1.3668, time < 24000, 1.5116);

  // Reactions:
  vGLT: -> GLCi; p_GLT_VmGLT*(f_GLCo - GLCi/p_GLT_KeqGLT)/(p_GLT_KmGLTGLCo*(1 + f_GLCo/p_GLT_KmGLTGLCo + GLCi/p_GLT_KmGLTGLCi + 0.91*f_GLCo*GLCi/(p_GLT_KmGLTGLCi*p_GLT_KmGLTGLCo)));
  vGLK: GLCi + ATP -> G6P + ADP; p_HXK_ExprsCor*(p_HXK1_kcat*(f_HXK1 + f_HXK2)/(p_HXK1_Katp*p_HXK1_Kglc)*(ATP*GLCi - ADP*G6P/p_HXK1_Keq)/((1 + ATP/p_HXK1_Katp + ADP/p_HXK1_Kadp)*(1 + GLCi/p_HXK1_Kglc + G6P/p_HXK1_Kg6p + p_T6P_ss/p_HXK1_Kt6p)));
  vPGI: G6P -> F6P; p_PGI_ExprsCor*(p_PGI1_kcat*f_PGI1/p_PGI1_Kg6p*(G6P - F6P/p_PGI1_Keq)/(1 + G6P/p_PGI1_Kg6p + 1 + F6P/p_PGI1_Kf6p - 1));
  vPFK: F6P + ATP -> F16BP + ADP; p_PFK_ExprsCor*(p_PFK_kcat*f_PFK*p_PFK_gR*(F6P/p_PFK_Kf6p)*(ATP/p_PFK_Katp)*(1 + F6P/p_PFK_Kf6p + ATP/p_PFK_Katp + p_PFK_gR*(F6P/p_PFK_Kf6p)*(ATP/p_PFK_Katp))/((1 + F6P/p_PFK_Kf6p + ATP/p_PFK_Katp + p_PFK_gR*(F6P/p_PFK_Kf6p)*(ATP/p_PFK_Katp))^2 + p_PFK_L*((1 + p_PFK_Ciatp*(ATP/p_PFK_Kiatp))/(1 + ATP/p_PFK_Kiatp))^2*((1 + p_PFK_Camp*(AMP/p_PFK_Kamp))/(1 + AMP/p_PFK_Kamp))^2*((1 + p_PFK_Cf26bp*p_PFK_F26BP/p_PFK_Kf26bp + p_PFK_Cf16bp*F16BP/p_PFK_Kf16bp)/(1 + p_PFK_F26BP/p_PFK_Kf26bp + F16BP/p_PFK_Kf16bp))^2*(1 + p_PFK_Catp*(ATP/p_PFK_Katp))^2));  // modifiers: AMP
  vALD: F16BP -> GLYCERAL3P + DHAP; p_FBA_ExprsCor*(p_FBA1_kcat*f_FBA1/p_FBA1_Kf16bp*(F16BP - GLYCERAL3P*DHAP/p_FBA1_Keq)/(1 + F16BP/p_FBA1_Kf16bp + (1 + GLYCERAL3P/p_FBA1_Kglyceral3p)*(1 + DHAP/p_FBA1_Kdhap) - 1));
  vTPI: DHAP -> GLYCERAL3P; p_TPI1_kcat*f_TPI1/p_TPI1_Kdhap*(DHAP - GLYCERAL3P/p_TPI1_Keq)/(1 + DHAP/p_TPI1_Kdhap + 1 + GLYCERAL3P/p_TPI1_Kglyceral3p - 1);
  vGAPDH: GLYCERAL3P + NAD + PHOS -> BPG + NADH; p_GAPDH_ExprsCor*(p_TDH1_kcat*(f_TDH1 + f_TDH2 + f_TDH3)/(p_TDH1_Kglyceral3p*p_TDH1_Knad*p_TDH1_Kpi)*(GLYCERAL3P*NAD*PHOS - BPG*NADH/p_TDH1_Keq)/((1 + GLYCERAL3P/p_TDH1_Kglyceral3p)*(1 + NAD/p_TDH1_Knad)*(1 + PHOS/p_TDH1_Kpi) + (1 + BPG/p_TDH1_Kglycerate13bp)*(1 + NADH/p_TDH1_Knadh) - 1));
  vPGK: BPG + ADP -> P3G + ATP; p_PGK_ExprsCor*p_PGK_VmPGK*(p_PGK_KeqPGK*BPG*ADP - ATP*P3G)/(p_PGK_KmPGKATP*p_PGK_KmPGKP3G*(1 + ADP/p_PGK_KmPGKADP + ATP/p_PGK_KmPGKATP)*(1 + BPG/p_PGK_KmPGKBPG + P3G/p_PGK_KmPGKP3G));
  vPGM: P3G -> P2G; p_PGM_ExprsCor*(p_GPM1_kcat*(f_GPM1 + f_GPM2 + f_GPM3)/p_GPM1_K3pg*(P3G - P2G/p_GPM1_Keq)/(1 + P3G/p_GPM1_K3pg + 1 + P2G/p_GPM1_K2pg - 1));
  vENO: P2G -> PEP; p_ENO_ExprsCor*(p_ENO1_kcat*(f_ENO1 + f_ENO2)/p_ENO1_K2pg*(P2G - PEP/p_ENO1_Keq)/(1 + P2G/p_ENO1_K2pg + 1 + PEP/p_ENO1_Kpep - 1));
  vPYK: PEP + ADP -> PYR + ATP; p_PYK_ExprsCor*(p_PYK1_kcat*(f_PYK1 + f_PYK2)/(p_PYK1_Kadp*p_PYK1_Kpep)*ADP*PEP/((1 + ADP/p_PYK1_Kadp)*(1 + PEP/p_PYK1_Kpep)))*((PEP/p_PYK1_Kpep + 1)^p_PYK1_hill/(p_PYK1_L*((ATP/p_PYK1_Katp + 1)/(F16BP/p_PYK1_Kf16bp + 1))^p_PYK1_hill + (PEP/p_PYK1_Kpep + 1)^p_PYK1_hill));  // modifiers: F16BP
  vPDC: PYR -> ACE; p_PDC_ExprsCor*(p_PDC1_kcat*f_PDC1*(PYR/p_PDC1_Kpyr)^p_PDC1_hill/(1 + (PYR/p_PDC1_Kpyr)^p_PDC1_hill + PHOS/p_PDC1_Kpi));  // modifiers: PHOS
  vADH: ACE + NADH -> ETOH + NAD; -p_ADH_ExprsCor*(p_ADH_VmADH/(p_ADH_KiADHNAD*p_ADH_KmADHETOH)*(NAD*ETOH - NADH*ACE/p_ADH_KeqADH)/(1 + NAD/p_ADH_KiADHNAD + p_ADH_KmADHNAD*ETOH/(p_ADH_KiADHNAD*p_ADH_KmADHETOH) + p_ADH_KmADHNADH*ACE/(p_ADH_KiADHNADH*p_ADH_KmADHACE) + NADH/p_ADH_KiADHNADH + NAD*ETOH/(p_ADH_KiADHNAD*p_ADH_KmADHETOH) + p_ADH_KmADHNADH*NAD*ACE/(p_ADH_KiADHNAD*p_ADH_KiADHNADH*p_ADH_KmADHACE) + p_ADH_KmADHNAD*ETOH*NADH/(p_ADH_KiADHNAD*p_ADH_KmADHETOH*p_ADH_KiADHNADH) + NADH*ACE/(p_ADH_KiADHNADH*p_ADH_KmADHACE) + NAD*ETOH*ACE/(p_ADH_KiADHNAD*p_ADH_KmADHETOH*p_ADH_KiADHACE) + ETOH*NADH*ACE/(p_ADH_KiADHETOH*p_ADH_KiADHNADH*p_ADH_KmADHACE)));
  vG3PDH: NADH + DHAP -> NAD + GLYC3P; p_GPD1_kcat*f_GPD1/(p_GPD1_Kdhap*p_GPD1_Knadh)*(DHAP*NADH - GLYC3P*NAD/p_GPD1_Keq)/((1 + F16BP/p_GPD1_Kf16bp + ATP/p_GPD1_Katp + ADP/p_GPD1_Kadp)*(1 + DHAP/p_GPD1_Kdhap + GLYC3P/p_GPD1_Kglyc3p)*(1 + NADH/p_GPD1_Knadh + NAD/p_GPD1_Knad));  // modifiers: F16BP, ADP, ATP
  vHOR2: GLYC3P -> GLYCEROL + PHOS; p_HOR2_kcat*f_HOR2/p_HOR2_Kglyc3p*GLYC3P/((1 + PHOS/p_HOR2_Kpi)*(1 + GLYC3P/p_HOR2_Kglyc3p));
  vPGM1: G1P -> ; 0;
  vTPS1: G1P + ATP -> T6P + ADP + 2 PHOS; 0;
  vTPS2: T6P -> TRE + PHOS; 0;
  vNTH1: TRE -> ; 0;
  vVacPi: -> PHOS; p_vacuolePi_k*(p_vacuolePi_steadyStatePi - PHOS);
  vADK1: 2 ADP -> ATP + AMP; p_ADK1_k*(ADP*ADP - AMP*ATP/p_ADK1_Keq);
  vmitoNADH: NADH -> NAD; p_mitoNADHVmax*(NADH/(NADH + p_mitoNADHKm));
  vAmd1: AMP -> IMP; 0;
  vAde1312: IMP -> AMP; 0;
  vIsn1: IMP -> INO + PHOS; 0;
  vPnp1: INO -> HYP; 0;
  vHpt1: HYP + PHOS -> IMP; 0;
  vETOHt: ETOH -> ; p_kETOHtransport*(ETOH - f_ETOH_e);
  vGLYCt: GLYCEROL -> ; p_GlycerolTransport*(GLYCEROL - f_GLYCEROL_e);
  vATPase: ATP -> ADP + PHOS; gam_ngam*ATP/ADP*adp_atp_ratio;
  vmito: ADP + PHOS -> ATP; (-poly_sinkPYR*(PYR/(PYR + km_sinkPYR))*3 + p_PDC_ExprsCor*(p_PDC1_kcat*f_PDC1*(PYR/p_PDC1_Kpyr)^p_PDC1_hill/(1 + (PYR/p_PDC1_Kpyr)^p_PDC1_hill + PHOS/p_PDC1_Kpi))*1)/RQ*0.95;  // modifiers: PYR
  vsinkG6P: PHOS -> G6P; poly_sinkG6P*(G6P/(G6P + km_sinkG6P));
  vsinkF6P: PHOS -> F6P; poly_sinkF6P*(F6P/(F6P + km_sinkF6P));
  vsinkGAP: PHOS -> GLYCERAL3P; poly_sinkGAP*(GLYCERAL3P/(GLYCERAL3P + km_sinkGAP));
  vsinkP3G: PHOS -> P3G; poly_sinkP3G*(P3G/(P3G + km_sinkP3G));
  vsinkPEP: PHOS -> PEP; poly_sinkPEP*(PEP/(PEP + km_sinkPEP));
  vsinkPYR: -> PYR; poly_sinkPYR*(PYR/(PYR + km_sinkPYR));
  vsinkACE: -> ACE; poly_sinkACE*(ACE/(ACE + km_sinkACE));

  // Events:
  E1: at ((time > 3000) && (time < 3001)): AMP = 0.229, ADP = 0.7765, ATP = 2.828;
  E2: at ((time > 6000) && (time < 6001)): AMP = 0.2455, ADP = 0.8835, ATP = 3.2825;
  E3: at ((time > 9000) && (time < 9001)): AMP = 0.2585, ADP = 0.8925, ATP = 3.2965;
  E4: at ((time > 12000) && (time < 12001)): AMP = 0.301, ADP = 1.0175, ATP = 3.732;
  E5: at ((time > 15000) && (time < 15001)): AMP = 0.1875, ADP = 0.8315, ATP = 3.454;
  E6: at ((time > 18000) && (time < 18001)): AMP = 0.2, ADP = 0.8115, ATP = 3.3985;
  E7: at ((time > 21000) && (time < 21001)): AMP = 0.093, ADP = 0.4825, ATP = 3.0315;
  E8: at ((time > 24000) && (time < 24001)): AMP = 0.112, ADP = 0.4795, ATP = 2.9025;
end
