// SBML level 3 version 1

model feedback()

  // Compartments:
  compartment default_compartment = 1;

  // Species:
  species ATP in default_compartment = 3.642;
  species MALTec in default_compartment = 0;
  species ADP in default_compartment = 1.2255;
  species PHOS in default_compartment = 0;
  species MALTic in default_compartment = 0;
  species GLCi in default_compartment = 2.2406;
  species SUCec in default_compartment = 0;
  species GLCec in default_compartment = 0.0998;
  species FRCec in default_compartment = 0.1915;
  species Vbroth in default_compartment = 4;
  species G6P in default_compartment = 2.9538;
  species T6P in default_compartment = 0.2306;
  species FRCi in default_compartment = 0;
  species F6P in default_compartment = 0.8439;
  species F16BP in default_compartment = 0.1676;
  species AMP in default_compartment = 0.215;
  species GLYCERAL3P in default_compartment = 0.0093;
  species DHAP in default_compartment = 0.2101;
  species NAD in default_compartment = 41.8233;
  species BPG in default_compartment = 0;
  species NADH in default_compartment = 0.0026;
  species P3G in default_compartment = 4.0251;
  species P2G in default_compartment = 0.4087;
  species PEP in default_compartment = 1.8308;
  species PYR in default_compartment = 0;
  species ACE in default_compartment = 0;
  species ETOH in default_compartment = 0;
  species GLYC3P in default_compartment = 0;
  species GLYCEROL in default_compartment = 0;
  species ETOHec in default_compartment = 0;
  species GLYCEROLec in default_compartment = 0;
  species G1P in default_compartment = 0;
  species UDP_GLC in default_compartment = 0;
  species TRE in default_compartment = 5.1877;
  species TREec in default_compartment = 0;
  species TREvac in default_compartment = 46.6982;
  species Glycogen_cyt in default_compartment = 100;
  species IMP in default_compartment = 0;
  species INO in default_compartment = 0;
  species HYP in default_compartment = 0;

  // Parameters:
  p_MAT_VmMAT = 1.3636;
  p_MAT_KmMAT_ATP = 8.0385;
  p_MAT_KmMAT_Maltec = 0.3953;
  Maltecmin = 0;
  p_MALX2_VmMALX2 = 0.1733;
  p_MALX2_KmMALX2_Maltic = 0.2471;
  p_INV_VmINV = 0.9496;
  p_INV_KmINV = 0.0989;
  FRCin = 0;
  SUCin = 7500/180/2;
  MALTin = 0;
  p_GLT_VmGLT = 0.1779;
  Csmin = 0.0998;
  p_GLT_KeqGLT = 1;
  p_GLT_KmGLTGLCo = 0.0108;
  p_GLT_KmGLTGLCi = 0.0108;
  FRCecmin = 0.0917;
  p_GLT_KiGLTFRC = 0.0294;
  p_HXK_ExprsCor = 1;
  p_HXK1_kcat = 6.7325;
  f_HXK1 = 1;
  f_HXK2 = 0;
  p_HXK1_Katp = 0.0545;
  p_HXK1_Kglc = 0.0033;
  p_HXK1_Keq = 18.8164;
  p_HXK1_Kadp = 0.0783;
  p_HXK1_Kg6p = 2953.7;
  p_HXK1_Kt6p = 0.0626;
  p_HXK1_KiFRC = 562520;
  p_FRT_VmFRT = 1.249;
  p_FRT_KeqFRT = 1;
  p_FRT_KmFRTFRCo = 2.4522;
  p_FRT_KmFRTFRCi = 2.4522;
  p_FRT_KiFRTGLC = 1.1067;
  p_HXK1_kcatfrc = 34.3035;
  p_HXK1_Kfrc = 0.1215;
  p_HXK1_Keqfrc = 3.7886;
  p_HXK1_Kf6p = 3205;
  p_HXK1_KiGLC = 978.8793;
  p_PGI_ExprsCor = 1;
  p_PGI1_kcat = 2.3215;
  f_PGI1 = 1;
  p_PGI1_Kg6p = 7.9987;
  p_PGI1_Keq = 0.9564;
  p_PGI1_Kf6p = 7.2433;
  p_PFK_ExprsCor = 1;
  p_PFK_kcat = 8.7826;
  f_PFK = 1;
  p_PFK_gR = 1.8127;
  p_PFK_Kf6p = 0.0589;
  p_PFK_Katp = 1.9971;
  p_PFK_L = 1.3886;
  p_PFK_Ciatp = 40.3824;
  p_PFK_Kiatp = 4.9332;
  p_PFK_Camp = 0.0287;
  p_PFK_Kamp = 0.01;
  p_PFK_Cf26bp = 0.0283;
  p_PFK_F26BP = 0.001;
  p_PFK_Kf26bp = 0.0012;
  p_PFK_Cf16bp = 2.3638;
  p_PFK_Kf16bp = 0.0437;
  p_PFK_Catp = 1.2822;
  p_FBA_ExprsCor = 1;
  p_FBA1_kcat = 4.4067;
  f_FBA1 = 1;
  p_FBA1_Kf16bp = 0.6872;
  p_FBA1_Keq = 0.1223;
  p_FBA1_Kglyceral3p = 3.5582;
  p_FBA1_Kdhap = 0.03;
  p_TPI1_kcat = 16.1694;
  f_TPI1 = 1;
  p_TPI1_Kdhap = 1.2887;
  p_TPI1_Keq = 0.0515;
  p_TPI1_Kglyceral3p = 8.8483;
  p_GAPDH_ExprsCor = 1;
  p_TDH1_kcat = 60.3784;
  f_TDH1 = 1;
  f_TDH2 = 0;
  f_TDH3 = 0;
  p_TDH1_Kglyceral3p = 1.6433;
  p_TDH1_Knad = 1.203;
  p_TDH1_Kpi = 0.8143;
  p_TDH1_Keq = 0.0054;
  p_TDH1_Kglycerate13bp = 0.9221;
  p_TDH1_Knadh = 0.0418;
  p_PGK_ExprsCor = 1;
  p_PGK_VmPGK = 55.1626;
  p_PGK_KeqPGK = 3234.8;
  p_PGK_KmPGKATP = 0.2859;
  p_PGK_KmPGKP3G = 0.4759;
  p_PGK_KmPGKADP = 0.2064;
  p_PGK_KmPGKBPG = 0.0031;
  p_PGM_ExprsCor = 1;
  p_GPM1_kcat = 11.3652;
  f_GPM1 = 1;
  f_GPM2 = 0;
  f_GPM3 = 0;
  p_GPM1_K3pg = 1.4151;
  p_GPM1_Keq = 0.1193;
  p_GPM1_K2pg = 0.075;
  p_ENO_ExprsCor = 1;
  p_ENO1_kcat = 3.3018;
  f_ENO1 = 1;
  f_ENO2 = 0;
  p_ENO1_K2pg = 0.0567;
  p_ENO1_Keq = 4.3589;
  p_ENO1_Kpep = 0.4831;
  p_PYK_ExprsCor = 1;
  p_PYK1_kcat = 9.3167;
  f_PYK1 = 1;
  f_PYK2 = 0;
  p_PYK1_Kadp = 0.243;
  p_PYK1_Kpep = 0.281;
  p_PYK1_hill = 4;
  p_PYK1_L = 60000;
  p_PYK1_Katp = 9.3;
  p_PYK1_Kf16bp = 0.1732;
  p_PDC_ExprsCor = 1;
  p_PDC1_kcat = 8.3613;
  f_PDC1 = 0.529;
  p_PDC1_Kpyr = 12.968;
  p_PDC1_hill = 0.7242;
  p_PDC1_Kpi = 9.4294;
  p_ADH_ExprsCor = 1;
  p_ADH_VmADH = 13.2581;
  p_ADH_KiADHNAD = 0.9677;
  p_ADH_KmADHETOH = 4.897;
  p_ADH_KeqADH = 6.8487e-5;
  p_ADH_KmADHNAD = 0.1534;
  p_ADH_KmADHNADH = 0.1208;
  p_ADH_KiADHNADH = 0.0316;
  p_ADH_KmADHACE = 1.1322;
  p_ADH_KiADHACE = 0.6431;
  p_ADH_KiADHETOH = 59.6935;
  p_GPD1_kcat = 1.7064;
  f_GPD1 = 1;
  p_GPD1_Kdhap = 2.7041;
  p_GPD1_Knadh = 0.0322;
  p_GPD1_Keq = 10266;
  p_GPD1_Kf16bp = 12.7519;
  p_GPD1_Katp = 0.5573;
  p_GPD1_Kadp = 1.1069;
  p_GPD1_Kglyc3p = 3.2278;
  p_GPD1_Knad = 0.6902;
  p_HOR2_kcat = 2.2437;
  f_HOR2 = 1;
  p_HOR2_Kglyc3p = 1.5101;
  p_HOR2_Kpi = 2.5491;
  p_kETOHtransport = 0.0328;
  p_GlycerolTransport = 0.1001;
  p_PGM1_kcat = 13.7362;
  f_PGM1 = 1;
  f_PGM2 = 0;
  f_PGM3 = 0;
  p_PGM1_Kg1p = 0.2431;
  p_PGM1_Keq = 2.2257;
  p_PGM1_Kg6p = 0.0022;
  p_UGP_kcat = 1442.7;
  f_UGP = 0.0024;
  UTP = 1.1179;
  p_UGP_Kutp = 0.9797;
  p_UGP_Kg1p = 0.1321;
  p_UGP_Ki_utp = 0.2387;
  p_UGP_Ki_udp_glc = 0.0163;
  p_TPS1_KmF6P = 0.0323;
  p_TPS1_kcat = 728.5755;
  f_TPS1 = 0.0014;
  p_TPS1_Kg6p = 0.3471;
  p_TPS1_Kudp_glc = 0.1589;
  p_TPS1_Kpi = 0.4405;
  p_TPS2_kcat = 18.3737;
  f_TPS2 = 0.0013;
  p_TPS2_Kt6p = 0.1771;
  p_TPS2_Kpi = 0.477;
  p_NTH1_kcat = 17246;
  f_NTH1 = 0.002;
  p_NTH1_Ktre = 4.8496;
  p_ATH1_kcat_ec = 546.7721;
  f_ATH1ec = 0.0018;
  p_ATH1_Ktre_ec = 6162.4;
  p_ATH1_Kt6p_ec = 0.1;
  p_ATH1_kcat = 546.7721;
  f_ATH1vac = 0.000196;
  p_ATH1_Ktre = 6162.4;
  p_ATH1_Kt6p = 0.1;
  p_AGT1_kcat = 476.4645;
  f_AGT1 = 6.7e-5;
  p_AGT1_Ktre = 0.0855;
  p_AGT1_Keq = 7.3;
  p_AGT1_Ktre_ec = 0.6846;
  p_AGT1_Ki = 18.0908;
  p_vacuoleT_vmax = 6.6697e-5;
  p_vacuoleT_Ktre = 2.8274;
  p_vacuoleT_Keq = 1;
  glycSynth_K = 0;
  glycDeg_K = 0;
  poly_sinkG6P = -0.0778536;
  km_sinkG6P = 0.1;
  poly_sinkF6P = 0.024574614;
  km_sinkF6P = 0.01;
  poly_sinkGAP = 0.0126269097;
  km_sinkGAP = 0.0005;
  poly_sinkP3G = -0.007881;
  km_sinkP3G = 0.001;
  poly_sinkPEP = -0.007607;
  km_sinkPEP = 0.001;
  poly_sinkPYR = -0.1613283;
  km_sinkPYR = 0.01;
  poly_sinkACE = -0.0348361668;
  km_sinkACE = 0.0001;
  p_ADK1_k = 77.3163;
  p_ADK1_Keq = 0.2676;
  p_ATPaseK = 0.2219;
  p_mitoVmax = 0.7547;
  p_mitoADPKm = 0.3394;
  p_mitoPiKm = 0.4568;
  p_mitoNADHVmax = 0.2401;
  p_mitoNADHKm = 0.0012;
  p_vacuolePi_k = 0.1699;
  p_vacuolePi_steadyStatePi = 10;
  GLCin = 0;
  UDP = 0.2534;
  p_TPI_ExprsCor = 1;
  f_GLK1 = 0;
  f_GPD2 = 0;
  f_PGK1 = 0.132;
  f_PDC5 = 0.0059;
  f_PDC6 = 0.0034;
  f_ADH1 = 0.0933;
  f_ADH2 = 0;
  f_ADH3 = 0.0019;
  f_ADH4 = 0.0359;
  f_ADH5 = 0.0023;
  f_ADH6 = 0.0171;
  f_ADH7 = 0;
  f_RHR2 = 0;
  f_UGP1 = 0.00031;
  f_ATH1 = 0.002;
  p_nATP_nMaltec = 0.1075;
  sin_y1 = sin(time/22.5 + 2.68)*0.0101 + 0.0109;
  sin_y2 = sin(time/87 + 4.6)*0.0101 + 0.0115;
  sin_y1d = sin(time/12 + 2.1)*0.0101 + 0.0109;
  sin_y2d = sin(time/110 + 4.6)*0.0101 + 0.01;

  // Assignment rules:
  Fin := piecewise(0.043/20, time < 20.1, 0, time < 400.1, 0.043/20, time < 420.1, 0, time < 800.1, 0.043/20, time < 820.1, 0, time < 1200.1, 0.043/20, time < 1220.1, 0, time < 1600.1, 0.043/20, time < 1620.1, 0, time < 2000.1, 0);
  Fout := piecewise(0, time < 20.1, 0.000166, time < 280.1, 0, time < 420.1, 0.000166, time < 680.1, 0, time < 820.1, 0.000166, time < 1080.1, 0, time < 1220.1, 0.000166, time < 1480.1, 0, time < 1620.1, 0.000166, time < 1880.1, 0);
  temp_v_glycSynth := 0.73*piecewise(sin_y2, time > 61, sin_y1, time > 401, sin_y2, time > 461, sin_y1, time > 801, sin_y2, time > 861, sin_y1, time > 1201, sin_y2, time > 1261, sin_y1, time > 1601, sin_y2, time > 1661, sin_y1, time > 2001, 0);
  temp_v_glycDeg := 0.73*piecewise(sin_y2d, time > 31, sin_y1d, time > 401, sin_y2d, time > 431, sin_y1d, time > 801, sin_y2d, time > 831, sin_y1d, time > 1201, sin_y2d, time > 1231, sin_y1d, time > 1601, sin_y2d, time > 1631, sin_y1d, time > 2001, 0);

  // Reactions:
  vMAT: 0.1075 ATP + 0.007278 MALTec -> 0.1075 ADP + 0.1075 PHOS + MALTic; p_MAT_VmMAT/(p_MAT_KmMAT_ATP*p_MAT_KmMAT_Maltec)*(ATP*(MALTec - Maltecmin)/((1 + ATP/p_MAT_KmMAT_ATP)*(1 + (MALTec - Maltecmin)/p_MAT_KmMAT_Maltec)));
  vMALX2: MALTic -> 2 GLCi; p_MALX2_VmMALX2*MALTic/(p_MALX2_KmMALX2_Maltic + MALTic);
  vINV: SUCec -> GLCec + FRCec; p_INV_VmINV*SUCec/(p_INV_KmINV + SUCec);
  FinFructose: -> FRCec; Fin*FRCin/Vbroth;  // modifiers: Vbroth
  FoutFructose: FRCec -> ; Fout*FRCec/Vbroth;  // modifiers: Vbroth
  FinSucrose: -> SUCec; Fin*SUCin/Vbroth;  // modifiers: Vbroth
  FoutSucrose: SUCec -> ; Fout*SUCec/Vbroth;  // modifiers: Vbroth
  FinMaltose: -> MALTec; Fin*MALTin/Vbroth;  // modifiers: Vbroth
  FoutMaltose: MALTec -> ; Fout*MALTec/Vbroth;  // modifiers: Vbroth
  vGLT: 0.007278 GLCec -> GLCi; p_GLT_VmGLT*(GLCec - Csmin - GLCi/p_GLT_KeqGLT)/(p_GLT_KmGLTGLCo*(1 + (GLCec - Csmin)/p_GLT_KmGLTGLCo + GLCi/p_GLT_KmGLTGLCi + 0.91*(GLCec - Csmin)*GLCi/(p_GLT_KmGLTGLCi*p_GLT_KmGLTGLCo) + (FRCec - FRCecmin)/p_GLT_KiGLTFRC));  // modifiers: FRCec
  vGLK: GLCi + ATP -> G6P + ADP; p_HXK_ExprsCor*(p_HXK1_kcat*(f_HXK1 + f_HXK2)/(p_HXK1_Katp*p_HXK1_Kglc)*(ATP*GLCi - ADP*G6P/p_HXK1_Keq)/((1 + ATP/p_HXK1_Katp + ADP/p_HXK1_Kadp)*(1 + GLCi/p_HXK1_Kglc + G6P/p_HXK1_Kg6p + T6P/p_HXK1_Kt6p + FRCi/p_HXK1_KiFRC)));  // modifiers: T6P, FRCi
  vFRT: 0.007278 FRCec -> FRCi; p_FRT_VmFRT*(FRCec - FRCecmin - FRCi/p_FRT_KeqFRT)/(p_FRT_KmFRTFRCo*(1 + (FRCec - FRCecmin)/p_FRT_KmFRTFRCo + FRCi/p_FRT_KmFRTFRCi + 0.91*(FRCec - FRCecmin)*FRCi/(p_FRT_KmFRTFRCi*p_FRT_KmFRTFRCo) + (GLCec - Csmin)/p_FRT_KiFRTGLC));  // modifiers: GLCec
  vFRK: FRCi + ATP -> F6P + ADP; p_HXK_ExprsCor*(p_HXK1_kcatfrc*(f_HXK1 + f_HXK2)/(p_HXK1_Katp*p_HXK1_Kfrc)*(ATP*FRCi - ADP*F6P/p_HXK1_Keqfrc)/((1 + ATP/p_HXK1_Katp + ADP/p_HXK1_Kadp)*(1 + FRCi/p_HXK1_Kfrc + F6P/p_HXK1_Kf6p + T6P/p_HXK1_Kt6p + GLCi/p_HXK1_KiGLC)));  // modifiers: GLCi, T6P
  vPGI: G6P -> F6P; p_PGI_ExprsCor*(p_PGI1_kcat*f_PGI1/p_PGI1_Kg6p*(G6P - F6P/p_PGI1_Keq)/(1 + G6P/p_PGI1_Kg6p + 1 + F6P/p_PGI1_Kf6p - 1));
  vPFK: F6P + ATP -> F16BP + ADP; p_PFK_ExprsCor*(p_PFK_kcat*f_PFK*p_PFK_gR*(F6P/p_PFK_Kf6p)*(ATP/p_PFK_Katp)*(1 + F6P/p_PFK_Kf6p + ATP/p_PFK_Katp + p_PFK_gR*(F6P/p_PFK_Kf6p)*(ATP/p_PFK_Katp))/((1 + F6P/p_PFK_Kf6p + ATP/p_PFK_Katp + p_PFK_gR*(F6P/p_PFK_Kf6p)*(ATP/p_PFK_Katp))^2 + p_PFK_L*((1 + p_PFK_Ciatp*(ATP/p_PFK_Kiatp))/(1 + ATP/p_PFK_Kiatp))^2*((1 + p_PFK_Camp*(AMP/p_PFK_Kamp))/(1 + AMP/p_PFK_Kamp))^2*((1 + p_PFK_Cf26bp*p_PFK_F26BP/p_PFK_Kf26bp + p_PFK_Cf16bp*F16BP/p_PFK_Kf16bp)/(1 + p_PFK_F26BP/p_PFK_Kf26bp + F16BP/p_PFK_Kf16bp))^2*(1 + p_PFK_Catp*(ATP/p_PFK_Katp))^2));  // modifiers: AMP
  vALD: F16BP -> GLYCERAL3P + DHAP; p_FBA_ExprsCor*(p_FBA1_kcat*f_FBA1/p_FBA1_Kf16bp*(F16BP - GLYCERAL3P*DHAP/p_FBA1_Keq)/(1 + F16BP/p_FBA1_Kf16bp + (1 + GLYCERAL3P/p_FBA1_Kglyceral3p)*(1 + DHAP/p_FBA1_Kdhap) - 1));
  vTPI: DHAP -> GLYCERAL3P; p_TPI1_kcat*f_TPI1/p_TPI1_Kdhap*(DHAP - GLYCERAL3P/p_TPI1_Keq)/(1 + DHAP/p_TPI1_Kdhap + 1 + GLYCERAL3P/p_TPI1_Kglyceral3p - 1);
  vGAPDH: GLYCERAL3P + NAD + PHOS -> BPG + NADH; p_GAPDH_ExprsCor*(p_TDH1_kcat*(f_TDH1 + f_TDH2 + f_TDH3)/(p_TDH1_Kglyceral3p*p_TDH1_Knad*p_TDH1_Kpi)*(GLYCERAL3P*NAD*PHOS - BPG*NADH/p_TDH1_Keq)/((1 + GLYCERAL3P/p_TDH1_Kglyceral3p)*(1 + NAD/p_TDH1_Knad)*(1 + PHOS/p_TDH1_Kpi) + (1 + BPG/p_TDH1_Kglycerate13bp)*(1 + NADH/p_TDH1_Knadh) - 1));
  vPGK: BPG + ADP -> P3G + ATP; p_PGK_ExprsCor*p_PGK_VmPGK*(p_PGK_KeqPGK*BPG*ADP - ATP*P3G)/(p_PGK_KmPGKATP*p_PGK_KmPGKP3G*(1 + ADP/p_PGK_KmPGKADP + ATP/p_PGK_KmPGKATP)*(1 + BPG/p_PGK_KmPGKBPG + P3G/p_PGK_KmPGKP3G));
  vPGM: P3G -> P2G; p_PGM_ExprsCor*(p_GPM1_kcat*(f_GPM1 + f_GPM2 + f_GPM3)/p_GPM1_K3pg*(P3G - P2G/p_GPM1_Keq)/(1 + P3G/p_GPM1_K3pg + 1 + P2G/p_GPM1_K2pg - 1));
  vENO: P2G -> PEP; p_ENO_ExprsCor*(p_ENO1_kcat*(f_ENO1 + f_ENO2)/p_ENO1_K2pg*(P2G - PEP/p_ENO1_Keq)/(1 + P2G/p_ENO1_K2pg + 1 + PEP/p_ENO1_Kpep - 1));
  vPYK: PEP + ADP -> PYR + ATP; p_PYK_ExprsCor*(p_PYK1_kcat*(f_PYK1 + f_PYK2)/(p_PYK1_Kadp*p_PYK1_Kpep)*ADP*PEP/((1 + ADP/p_PYK1_Kadp)*(1 + PEP/p_PYK1_Kpep)))*((PEP/p_PYK1_Kpep + 1)^p_PYK1_hill/(p_PYK1_L*((ATP/p_PYK1_Katp + 1)/(F16BP/p_PYK1_Kf16bp + 1))^p_PYK1_hill + (PEP/p_PYK1_Kpep + 1)^p_PYK1_hill));  // modifiers: F16BP
  vPDC: PYR -> ACE; p_PDC_ExprsCor*(p_PDC1_kcat*f_PDC1*(PYR/p_PDC1_Kpyr)^p_PDC1_hill/(1 + (PYR/p_PDC1_Kpyr)^p_PDC1_hill + PHOS/p_PDC1_Kpi));  // modifiers: PHOS
  vADH: ACE + NADH -> ETOH + NAD; -p_ADH_ExprsCor*(p_ADH_VmADH/(p_ADH_KiADHNAD*p_ADH_KmADHETOH)*(NAD*ETOH - NADH*ACE/p_ADH_KeqADH)/(1 + NAD/p_ADH_KiADHNAD + p_ADH_KmADHNAD*ETOH/(p_ADH_KiADHNAD*p_ADH_KmADHETOH) + p_ADH_KmADHNADH*ACE/(p_ADH_KiADHNADH*p_ADH_KmADHACE) + NADH/p_ADH_KiADHNADH + NAD*ETOH/(p_ADH_KiADHNAD*p_ADH_KmADHETOH) + p_ADH_KmADHNADH*NAD*ACE/(p_ADH_KiADHNAD*p_ADH_KiADHNADH*p_ADH_KmADHACE) + p_ADH_KmADHNAD*ETOH*NADH/(p_ADH_KiADHNAD*p_ADH_KmADHETOH*p_ADH_KiADHNADH) + NADH*ACE/(p_ADH_KiADHNADH*p_ADH_KmADHACE) + NAD*ETOH*ACE/(p_ADH_KiADHNAD*p_ADH_KmADHETOH*p_ADH_KiADHACE) + ETOH*NADH*ACE/(p_ADH_KiADHETOH*p_ADH_KiADHNADH*p_ADH_KmADHACE)));
  vG3PDH: NADH + DHAP -> NAD + GLYC3P; p_GPD1_kcat*f_GPD1/(p_GPD1_Kdhap*p_GPD1_Knadh)*(DHAP*NADH - GLYC3P*NAD/p_GPD1_Keq)/((1 + F16BP/p_GPD1_Kf16bp + ATP/p_GPD1_Katp + ADP/p_GPD1_Kadp)*(1 + DHAP/p_GPD1_Kdhap + GLYC3P/p_GPD1_Kglyc3p)*(1 + NADH/p_GPD1_Knadh + NAD/p_GPD1_Knad));  // modifiers: ATP, ADP, F16BP
  vHOR2: GLYC3P -> GLYCEROL + PHOS; p_HOR2_kcat*f_HOR2/p_HOR2_Kglyc3p*GLYC3P/((1 + PHOS/p_HOR2_Kpi)*(1 + GLYC3P/p_HOR2_Kglyc3p));
  vETOHt: ETOH -> 0.007278 ETOHec; p_kETOHtransport*(ETOH - ETOHec);
  vGLYCt: GLYCEROL -> 0.007278 GLYCEROLec; p_GlycerolTransport*(GLYCEROL - GLYCEROLec);
  vPGM1: G1P -> G6P; p_PGM1_kcat*(f_PGM1 + f_PGM2 + f_PGM3)/p_PGM1_Kg1p*(G1P - G6P/p_PGM1_Keq)/(1 + G1P/p_PGM1_Kg1p + G6P/p_PGM1_Kg6p);
  vUGP: G1P -> UDP_GLC; p_UGP_kcat*f_UGP*(UTP/p_UGP_Kutp)*(G1P/p_UGP_Kg1p)/(p_UGP_Ki_utp/p_UGP_Kutp + UTP/p_UGP_Kutp + G1P/p_UGP_Kg1p + UTP/p_UGP_Kutp*(G1P/p_UGP_Kg1p) + p_UGP_Ki_utp/p_UGP_Kutp*(UDP_GLC/p_UGP_Ki_udp_glc) + G1P/p_UGP_Kg1p*(UDP_GLC/p_UGP_Ki_udp_glc));
  vTPS1: G6P + UDP_GLC + ATP -> T6P + ADP + 2 PHOS; F6P/(F6P + p_TPS1_KmF6P)*(p_TPS1_kcat*f_TPS1/(p_TPS1_Kg6p*p_TPS1_Kudp_glc)*G6P*UDP_GLC/((1 + G6P/p_TPS1_Kg6p)*(1 + UDP_GLC/p_TPS1_Kudp_glc)*(1 + PHOS/p_TPS1_Kpi)));  // modifiers: F6P
  vTPS2: T6P -> TRE + PHOS; p_TPS2_kcat*f_TPS2*T6P*PHOS/(p_TPS2_Kt6p*p_TPS2_Kpi + (p_TPS2_Kt6p + T6P)*PHOS);
  vNTH1: TRE -> 2 GLCi; p_NTH1_kcat*f_NTH1/p_NTH1_Ktre*TRE/(1 + TRE/p_NTH1_Ktre);
  vATH1ec: 0.007278 TREec -> 0.014556 GLCec; p_ATH1_kcat_ec*f_ATH1ec*(TREec/p_ATH1_Ktre_ec/(1 + TREec/p_ATH1_Ktre_ec + T6P/p_ATH1_Kt6p_ec));  // modifiers: T6P
  vATH1vac: TREvac -> 2 GLCi; p_ATH1_kcat*f_ATH1vac*(TREvac/p_ATH1_Ktre/(1 + TREvac/p_ATH1_Ktre + T6P/p_ATH1_Kt6p));  // modifiers: T6P
  vAGT1: TRE -> 0.007278 TREec; p_AGT1_kcat*f_AGT1*(1/p_AGT1_Ktre)*(TRE - TREec/p_AGT1_Keq)/(1 + TRE/p_AGT1_Ktre + TREec/p_AGT1_Ktre_ec + UDP_GLC/p_AGT1_Ki);  // modifiers: UDP_GLC
  vvacuoleT: TRE -> TREvac; p_vacuoleT_vmax*(1/p_vacuoleT_Ktre)*(TRE - TREvac/p_vacuoleT_Keq)/(1 + TRE/p_vacuoleT_Ktre + TREvac/p_vacuoleT_Ktre);
  vglycSynth_FF: UDP_GLC -> Glycogen_cyt; temp_v_glycSynth*UDP_GLC/(UDP_GLC + 0.0001);
  vglycDeg_FF: Glycogen_cyt + 0.5 PHOS -> GLCi; temp_v_glycDeg*Glycogen_cyt/(Glycogen_cyt + 0.0001);
  vglycSynth_preFF: UDP_GLC -> Glycogen_cyt; glycSynth_K*UDP_GLC;
  vglycDeg_preFF: Glycogen_cyt + 0.5 PHOS -> GLCi; glycDeg_K*Glycogen_cyt;
  vsinkG6P: -> G6P; poly_sinkG6P*(G6P/(G6P + km_sinkG6P));
  vsinkF6P: -> F6P; poly_sinkF6P*(F6P/(F6P + km_sinkF6P));
  vsinkGAP: -> GLYCERAL3P; poly_sinkGAP*(GLYCERAL3P/(GLYCERAL3P + km_sinkGAP));
  vsinkP3G: -> P3G; poly_sinkP3G*(P3G/(P3G + km_sinkP3G));
  vsinkPEP: -> PEP; poly_sinkPEP*(PEP/(PEP + km_sinkPEP));
  vsinkPYR: -> PYR; poly_sinkPYR*(PYR/(PYR + km_sinkPYR));
  vsinkACE: -> ACE; poly_sinkACE*(ACE/(ACE + km_sinkACE));
  vADK1: 2 ADP -> ATP + AMP; p_ADK1_k*(ADP*ADP - AMP*ATP/p_ADK1_Keq);
  vATPase: ATP -> ADP + PHOS; p_ATPaseK*ATP/ADP;
  vmito: ADP + PHOS -> ATP; p_mitoVmax*ADP/(ADP + p_mitoADPKm)*(PHOS/(PHOS + p_mitoPiKm));
  vmitoNADH: NADH -> NAD; p_mitoNADHVmax*(NADH/(NADH + p_mitoNADHKm));
  vVacPi: -> PHOS; p_vacuolePi_k*(p_vacuolePi_steadyStatePi - PHOS);
  vAmd1: AMP -> IMP; 0;
  vAde1312: IMP -> AMP; 0;
  vIsn1: IMP -> INO + PHOS; 0;
  vPnp1: INO -> HYP; 0;
  vHpt1: HYP + PHOS -> IMP; 0;
  Volinc: -> Vbroth; Fin;
  Voldec: Vbroth -> ; Fout;
  FinGlucose: -> GLCec; Fin*GLCin/Vbroth;  // modifiers: Vbroth
  FoutEthanol: ETOHec -> ; Fout*ETOHec/Vbroth;  // modifiers: Vbroth
  FoutGlycerol: GLYCEROLec -> ; Fout*GLYCEROLec/Vbroth;  // modifiers: Vbroth
  FoutGlucose: GLCec -> ; Fout*GLCec/Vbroth;  // modifiers: Vbroth
  FoutTrehalose: TREec -> ; Fout*TREec/Vbroth;  // modifiers: Vbroth
end
